OpenVSP model (file version 5), 1 components.
Geometry view with OpenVSP parameter names; values to 6 digits, angles in degrees, lengths in the model's unit.
Overall bounding box: X_Min=0 X_Len=1000 Y_Min=-753.821 Y_Len=1507.64 Z_Min=-89.8771 Z_Len=179.754

Wing "WingGeom1"
  location (X Y Z) 0 0 0, rotation 0 0 0
  symmetric about XZ
  bounding box size 1000 1507.64 179.754
  totals: TotalSpan=1500 TotalProjectedSpan=1498.63 TotalChord=515 TotalArea=543000 TotalAR=4.13608 MAC=600.411
  root: chord 1000, twist 0, CST airfoil ContLERad=1 LowDegree=4 ThickChord=0.17907 UpDegree=4 Au=[0.19504 0.25507 0.23642 0.23162 0.03189] Al=[-0.19504 -0.25507 -0.23642 -0.23162 -0.03189]
  sections:
    n  Span  Root_Chord  Tip_Chord  Area    Sweep  Sweep_Location  Dihedral  Twist  Twist_Location  tip airfoil
    1  150   1000        720        129000  60     0               0         0      0.25            as above
    2  100   720         280        50000   50     0               0         0      0.25            as above
    3  500   280         90         92500   40     0               3         0      0.25            CST airfoil ContLERad=1 LowDegree=7 ThickChord=0.119291 UpDegree=7 Au=[0.170988 0.157287 0.162312 0.143623 0.149218 0.137218 0.140721 0.141105] Al=[-0.170988 -0.157287 -0.162312 -0.143623 -0.149218 -0.137218 -0.140721 -0.141105]

User parameters
  Planform:B1 = 150  (B1)
  Planform:B2 = 100  (B2)
  Planform:B3 = 500  (B3)
  Planform:C1 = 1000  (Fuselage Length)
  Planform:C2 = 720  (C2)
  Planform:C3 = 280  (C3)
  Planform:C4 = 90  (C4)
  Planform:S1 = 60  (S1)
  Planform:S2 = 50  (S2)
  Planform:S3 = 40  (S3)

Parameter links (A drives B)
  UserParm:Planform:C1 -> WingGeom1:XSec_1:Root_Chord
  UserParm:Planform:C2 -> WingGeom1:XSec_2:Root_Chord
  UserParm:Planform:C3 -> WingGeom1:XSec_3:Root_Chord
  UserParm:Planform:C4 -> WingGeom1:XSec_3:Tip_Chord
  UserParm:Planform:B1 -> WingGeom1:XSec_1:Span
  UserParm:Planform:B2 -> WingGeom1:XSec_2:Span
  UserParm:Planform:B3 -> WingGeom1:XSec_3:Span
  UserParm:Planform:S1 -> WingGeom1:XSec_1:Sweep
  UserParm:Planform:S2 -> WingGeom1:XSec_2:Sweep
  UserParm:Planform:S3 -> WingGeom1:XSec_3:Sweep

Advanced link "WingBlending"
  input S1 = UserParm:Planform:S1
  input S2 = UserParm:Planform:S2
  input S3 = UserParm:Planform:S3
  input C1 = UserParm:Planform:C1
  input C2 = UserParm:Planform:C2
  input C3 = UserParm:Planform:C3
  input C4 = UserParm:Planform:C4
  input B1 = UserParm:Planform:B1
  input B2 = UserParm:Planform:B2
  input B3 = UserParm:Planform:B3
  output XSec_1_InLESweep = WingGeom1:XSec_1:InLESweep
  output XSec_1_InTESweep = WingGeom1:XSec_1:InTESweep
  output XSec_1_OutLESweep = WingGeom1:XSec_1:OutLESweep
  output XSec_1_OutTESweep = WingGeom1:XSec_1:OutTESweep
  output XSec_2_InLESweep = WingGeom1:XSec_2:InLESweep
  output XSec_2_InTESweep = WingGeom1:XSec_2:InTESweep
  output XSec_2_OutLESweep = WingGeom1:XSec_2:OutLESweep
  output XSec_2_OutTESweep = WingGeom1:XSec_2:OutTESweep
  output XSec_3_InLESweep = WingGeom1:XSec_3:InLESweep
  output XSec_3_InTESweep = WingGeom1:XSec_3:InTESweep
    double S12 = (S1+S2)/2.;
    double S23 = (S2+S3)/2.;

    XSec_1_InLESweep = XSec_1_OutLESweep = S12;
    XSec_1_InTESweep = XSec_1_OutTESweep = -S12;


    XSec_2_InLESweep = XSec_2_OutLESweep = S23;
    XSec_2_InTESweep = XSec_2_OutTESweep = -S12*0.6;

    XSec_3_InLESweep = S3;
    XSec_3_InTESweep = 0.7*S3;
